*Heading
** Job name: BLAH-reduced-imp Model name: Model-1
** Generated by: Abaqus/CAE 2022
*Preprint, echo=NO, model=NO, history=NO, contact=NO
**
** PARTS
**
*Part, name=BLAH-osso-cut-imp-dim
*End Part
**
*Part, name=cabeça-implante
*End Part
**
*Part, name=haste-implante-Copy
*End Part
**
**
** ASSEMBLY
**
*Assembly, name=Assembly
**
*Instance, name=cabeça-implante-1, part=cabeça-implante
   18.473149,    32.087275,           0.
*Node
      1,         -35.,       -26.25
      2,  -25.9563351,  -17.5562782
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*Element, type=CPS8R
  1,   83,  477,   21,   22,  491,  492,  493,  494
  2,   84,   83,   22,   23,  495,  494,  496,  497
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*Nset, nset=Set-1, generate
    1,  1427,     1
*Elset, elset=Set-1, generate
   1,  448,    1
** Section: CoCr-imp-section
*Solid Section, elset=Set-1, material=Co-Cr
22.5,
*End Instance
**
*Instance, name=haste-implante-Copy-1, part=haste-implante-Copy
   16.058126,     2.624674,           0.
*Node
      1,  -23.5413113,   11.9063234
      2,  -4.50187683,   30.2090282
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*Element, type=CPS8R
  1,   5, 211,  33,  34, 227, 228, 229, 230
  2,   4,   5,  34,   3, 231, 230, 232, 233
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*Nset, nset=Set-1, generate
   1,  639,    1
*Elset, elset=Set-1, generate
   1,  188,    1
** Section: Tit-imp-sect
*Solid Section, elset=Set-1, material=titanium
22.5,
*End Instance
**
*Instance, name=BLAH-osso-cut-imp-dim-1, part=BLAH-osso-cut-imp-dim
*Node
      1,   9.64843941,   25.7470608
      2,   24.6274719,   10.1465111
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*Element, type=CPS8R
  1,  296,  295,   34,   35, 1320, 1321, 1322, 1323
  2,  354,  349,  295,  296, 1324, 1325, 1320, 1326
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*Nset, nset=Set-1
    1,    2,    3,    4,    5,    6
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*Elset, elset=Set-1
    1,    2,    3,    4,    5,    6
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*Nset, nset=Set-2
    2,    3,    9,   10,   11,   12
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*Elset, elset=Set-2, generate
  281,  1069,     1
** Section: osso-trabecular-sect
*Solid Section, elset=Set-1, material=osso-trabecular
22.5,
** Section: osso-section
*Solid Section, elset=Set-2, material=osso-cortical
22.5,
*End Instance
**
*Node
      1,   5.97314882,   19.5872746,           0.
*Node
      2, -0.704770982,    45.096447,           0.
*Node
      3,   31.0009651,   35.8340263,           0.
*Nset, nset=BLAH-pontos, instance=BLAH-osso-cut-imp-dim-1
 3519, 3849
*Nset, nset=BLAH-pontos, instance=haste-implante-Copy-1
 609,
*Nset, nset=BLAH-pontos, instance=cabeça-implante-1
 1404,
*Nset, nset=Set-95
 2,
*Nset, nset=Set-96
 3,
*Nset, nset=Set-97, instance=BLAH-osso-cut-imp-dim-1
   23,   24,  158,  159,  160,  161
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*Elset, elset=Set-97, instance=BLAH-osso-cut-imp-dim-1
 322, 324, 356, 357, 363, 369
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*Nset, nset=m_Set-91
 2,
*Nset, nset=m_Set-92
 3,
*Nset, nset=m_Set-93
 1,
*Nset, nset=m_Set-94
 1,
*Elset, elset=_m_Surf-35_S3, internal, instance=cabeça-implante-1
  1,  2, 12, 19, 40, 43
*Elset, elset=_m_Surf-35_S4, internal, instance=cabeça-implante-1
 18,
*Elset, elset=_m_Surf-35_S1, internal, instance=cabeça-implante-1
  11,  13,  14,  20,  23,  44,  74,  76, 130
*Surface, type=ELEMENT, name=m_Surf-35
_m_Surf-35_S3, S3
_m_Surf-35_S4, S4
_m_Surf-35_S1, S1
*Elset, elset=_m_Surf-37_S3, internal, instance=haste-implante-Copy-1
   1,   2,   7,  13,  22,  23,  40,  48,  49,  50,  71,  80,  90, 184
*Elset, elset=_m_Surf-37_S2, internal, instance=haste-implante-Copy-1
   7,   9,  12,  19,  35,  37
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*Elset, elset=_m_Surf-37_S4, internal, instance=haste-implante-Copy-1
  2,  4,  7, 14, 27, 29, 36, 39, 43, 44, 47, 63
*Elset, elset=_m_Surf-37_S1, internal, instance=haste-implante-Copy-1
  2, 30, 31, 32, 37, 41, 44, 52, 85
*Surface, type=ELEMENT, name=m_Surf-37
_m_Surf-37_S3, S3
_m_Surf-37_S2, S2
_m_Surf-37_S4, S4
_m_Surf-37_S1, S1
*Elset, elset=_m_Surf-39_S3, internal, instance=haste-implante-Copy-1
   3,  20,  24,  62,  98, 185
*Elset, elset=_m_Surf-39_S4, internal, instance=haste-implante-Copy-1
  5, 16, 23, 57
*Elset, elset=_m_Surf-39_S2, internal, instance=haste-implante-Copy-1
 6,
*Elset, elset=_m_Surf-39_S1, internal, instance=haste-implante-Copy-1
 11, 12, 15, 21, 22, 54, 56, 61
*Surface, type=ELEMENT, name=m_Surf-39
_m_Surf-39_S3, S3
_m_Surf-39_S4, S4
_m_Surf-39_S2, S2
_m_Surf-39_S1, S1
*Elset, elset=_s_Surf-35_S3, internal, instance=BLAH-osso-cut-imp-dim-1
  10, 200
*Elset, elset=_s_Surf-35_S1, internal, instance=BLAH-osso-cut-imp-dim-1
  34,  39, 199, 214, 622, 623, 624
*Elset, elset=_s_Surf-35_S4, internal, instance=BLAH-osso-cut-imp-dim-1
  35,  37,  38, 179, 284
*Elset, elset=_s_Surf-35_S2, internal, instance=BLAH-osso-cut-imp-dim-1
 196, 285, 286
*Surface, type=ELEMENT, name=s_Surf-35
_s_Surf-35_S3, S3
_s_Surf-35_S1, S1
_s_Surf-35_S4, S4
_s_Surf-35_S2, S2
*Elset, elset=_s_Surf-37_S3, internal, instance=BLAH-osso-cut-imp-dim-1
   1,   3,   4,   5,  11,  16,  17,  19,  20,  22,  28, 195
*Elset, elset=_s_Surf-37_S1, internal, instance=BLAH-osso-cut-imp-dim-1
  13,  24,  43,  50,  59,  61, 166, 169, 173, 180, 181, 194, 196, 213, 240, 529
*Elset, elset=_s_Surf-37_S2, internal, instance=BLAH-osso-cut-imp-dim-1
  39,  40,  41,  81, 164, 171, 174, 184, 190, 192, 194, 212, 217, 426, 579
*Elset, elset=_s_Surf-37_S4, internal, instance=BLAH-osso-cut-imp-dim-1
  11,  43,  80, 170, 181, 183, 186, 187, 188, 191, 209, 211, 425, 427
*Surface, type=ELEMENT, name=s_Surf-37
_s_Surf-37_S3, S3
_s_Surf-37_S1, S1
_s_Surf-37_S2, S2
_s_Surf-37_S4, S4
*Elset, elset=_s_Surf-39_S1, internal, instance=cabeça-implante-1
   6,   7,  27,  79,  81, 107, 114
*Elset, elset=_s_Surf-39_S3, internal, instance=cabeça-implante-1
   9,  21,  28,  29,  30,  32,  35,  36,  85,  91, 121
*Surface, type=ELEMENT, name=s_Surf-39
_s_Surf-39_S1, S1
_s_Surf-39_S3, S3
*Elset, elset=_s_Surf-41_S4, internal, instance=cabeça-implante-1
 15, 45
*Elset, elset=_s_Surf-41_S2, internal, instance=cabeça-implante-1
 92, 93
*Surface, type=ELEMENT, name=s_Surf-41
_s_Surf-41_S4, S4
_s_Surf-41_S2, S2
*Elset, elset=_s_Surf-42_S2, internal, instance=BLAH-osso-cut-imp-dim-1
 440,
*Elset, elset=_s_Surf-42_S1, internal, instance=BLAH-osso-cut-imp-dim-1
 441,
*Elset, elset=_s_Surf-42_S4, internal, instance=BLAH-osso-cut-imp-dim-1
 443,
*Surface, type=ELEMENT, name=s_Surf-42
_s_Surf-42_S2, S2
_s_Surf-42_S1, S1
_s_Surf-42_S4, S4
*Elset, elset=_s_Surf-43_S4, internal, instance=cabeça-implante-1
 15, 45
*Elset, elset=_s_Surf-43_S2, internal, instance=cabeça-implante-1
 92, 93
*Surface, type=ELEMENT, name=s_Surf-43
_s_Surf-43_S4, S4
_s_Surf-43_S2, S2
*Elset, elset=_s_Surf-44_S2, internal, instance=BLAH-osso-cut-imp-dim-1
 440,
*Elset, elset=_s_Surf-44_S1, internal, instance=BLAH-osso-cut-imp-dim-1
 441,
*Elset, elset=_s_Surf-44_S4, internal, instance=BLAH-osso-cut-imp-dim-1
 443,
*Surface, type=ELEMENT, name=s_Surf-44
_s_Surf-44_S2, S2
_s_Surf-44_S1, S1
_s_Surf-44_S4, S4
** Constraint: Constraint-1
*Tie, name=Constraint-1, adjust=yes, type=SURFACE TO SURFACE
s_Surf-35, m_Surf-35
** Constraint: Constraint-2
*Tie, name=Constraint-2, adjust=yes, type=SURFACE TO SURFACE
s_Surf-37, m_Surf-37
** Constraint: Constraint-3
*Tie, name=Constraint-3, adjust=yes, type=SURFACE TO SURFACE
s_Surf-39, m_Surf-39
** Constraint: Constraint-4
*Coupling, constraint name=Constraint-4, ref node=m_Set-91, surface=s_Surf-41
*Distributing, weighting method=UNIFORM
** Constraint: Constraint-5
*Coupling, constraint name=Constraint-5, ref node=m_Set-92, surface=s_Surf-42
*Distributing, weighting method=UNIFORM
** Constraint: Constraint-6
*Coupling, constraint name=Constraint-6, ref node=m_Set-93, surface=s_Surf-43
*Distributing, weighting method=UNIFORM
** Constraint: Constraint-7
*Coupling, constraint name=Constraint-7, ref node=m_Set-94, surface=s_Surf-44
*Distributing, weighting method=UNIFORM
*End Assembly
**
** MATERIALS
**
*Material, name=Co-Cr
*Elastic
230000., 0.3
*Material, name=alumina
*Elastic
380000., 0.21
*Material, name=osso-cortical
*Elastic
17000., 0.3
*Material, name=osso-trabecular
*Elastic
1380., 0.3
*Material, name=stainless-steel-316
*Elastic
200000., 0.3
*Material, name=titanium
*Elastic
110000., 0.3
** ----------------------------------------------------------------
**
** STEP: Step-1
**
*Step, name=Step-1, nlgeom=NO
*Static
1., 1., 1e-05, 1.
**
** BOUNDARY CONDITIONS
**
** Name: BC-1 Type: Symmetry/Antisymmetry/Encastre
*Boundary
Set-97, ENCASTRE
**
** LOADS
**
** Name: Load-1   Type: Concentrated force
*Cload
Set-95, 1, 150.
Set-95, 2, -259.
** Name: Load-2   Type: Concentrated force
*Cload
Set-96, 1, -50.
Set-96, 2, 89.
**
** OUTPUT REQUESTS
**
*Restart, write, frequency=0
**
** FIELD OUTPUT: F-Output-1
**
*Output, field, variable=PRESELECT
**
** HISTORY OUTPUT: H-Output-1
**
*Output, history, variable=PRESELECT
*End Step
