*Heading
** Job name: DIV-NOIMP Model name: Model-1
** Generated by: Abaqus/CAE 2022
*Preprint, echo=NO, model=NO, history=NO, contact=NO
**
** PARTS
**
*Part, name=osso
*End Part
**
**
** ASSEMBLY
**
*Assembly, name=Assembly
**
*Instance, name=osso-4, part=osso
*Node
      1,  -4.76786709,   2.43368196
      2, -0.942866981,  -5.21631813
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*Element, type=CPS8R
  1,  712,  247,  248,  577, 1947, 1948, 1949, 1950
  2,  576,  715,  828,  313, 1951, 1952, 1953, 1954
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*Nset, nset=set-osso, generate
    1,  5755,     1
*Elset, elset=set-osso, generate
    1,  1864,     1
*Nset, nset=Set-2
    1,    2,    3,    4,    5,    6
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*Elset, elset=Set-2, generate
   1,  974,    1
*Nset, nset=Set-3
    1,    2,   13,   14,   15,   16
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*Elset, elset=Set-3, generate
  975,  1864,     1
** Section: osso-section
*Solid Section, elset=Set-2, material=osso
22.5,
** Section: tab-sect
*Solid Section, elset=Set-3, material=trabecular
22.5,
*End Instance
**
*Node
      1,  -6.01999998,   41.7099991,           0.
*Node
      2,   29.8199997,   36.8199997,           0.
*Node
      3,   7.30999994,   18.3700008,           0.
*Nset, nset=DIV-NOIMP, instance=osso-4
 3964, 5649
*Nset, nset=Set-2
 1,
*Nset, nset=Set-4
 2,
*Nset, nset=base-osso, instance=osso-4
    3,    4,  143,  144,  145,  146
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*Elset, elset=base-osso, instance=osso-4
 157, 159, 237, 238, 240, 242
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*Nset, nset=m_Set-3
 1,
*Nset, nset=m_Set-5
 2,
*Nset, nset=m_Set-7
 3,
*Nset, nset=m_Set-8
 3,
*Nset, nset=test-points, instance=osso-4
  5,  6,  9, 12
*Elset, elset=_s_Surf-1_S2, internal, instance=osso-4
 265,
*Elset, elset=_s_Surf-1_S4, internal, instance=osso-4
 267, 268
*Surface, type=ELEMENT, name=s_Surf-1
_s_Surf-1_S2, S2
_s_Surf-1_S4, S4
*Elset, elset=_s_Surf-2_S4, internal, instance=osso-4
 70,
*Elset, elset=_s_Surf-2_S2, internal, instance=osso-4
  77,  78, 447
*Surface, type=ELEMENT, name=s_Surf-2
_s_Surf-2_S4, S4
_s_Surf-2_S2, S2
*Elset, elset=_s_Surf-3_S2, internal, instance=osso-4
 265,
*Elset, elset=_s_Surf-3_S4, internal, instance=osso-4
 267, 268
*Surface, type=ELEMENT, name=s_Surf-3
_s_Surf-3_S2, S2
_s_Surf-3_S4, S4
*Elset, elset=_s_Surf-4_S4, internal, instance=osso-4
 70,
*Elset, elset=_s_Surf-4_S2, internal, instance=osso-4
  77,  78, 447
*Surface, type=ELEMENT, name=s_Surf-4
_s_Surf-4_S4, S4
_s_Surf-4_S2, S2
** Constraint: Constraint-1
*Coupling, constraint name=Constraint-1, ref node=m_Set-3, surface=s_Surf-1
*Distributing, weighting method=UNIFORM
** Constraint: Constraint-2
*Coupling, constraint name=Constraint-2, ref node=m_Set-5, surface=s_Surf-2
*Distributing, weighting method=UNIFORM
** Constraint: Constraint-3
*Coupling, constraint name=Constraint-3, ref node=m_Set-7, surface=s_Surf-3
*Distributing, weighting method=UNIFORM
** Constraint: Constraint-4
*Coupling, constraint name=Constraint-4, ref node=m_Set-8, surface=s_Surf-4
*Distributing, weighting method=UNIFORM
*End Assembly
**
** MATERIALS
**
*Material, name=osso
*Elastic
17000., 0.3
*Material, name=trabecular
*Elastic
1380., 0.3
** ----------------------------------------------------------------
**
** STEP: step-1
**
*Step, name=step-1, nlgeom=NO
*Static
1., 1., 1e-05, 1.
**
** BOUNDARY CONDITIONS
**
** Name: encastre-osso Type: Symmetry/Antisymmetry/Encastre
*Boundary
base-osso, ENCASTRE
**
** LOADS
**
** Name: FH2   Type: Concentrated force
*Cload
Set-2, 1, 150.
Set-2, 2, -259.
** Name: Load-2   Type: Concentrated force
*Cload
Set-4, 1, -50.
Set-4, 2, 86.
**
** OUTPUT REQUESTS
**
*Restart, write, frequency=0
**
** FIELD OUTPUT: F-Output-1
**
*Output, field, variable=PRESELECT
**
** HISTORY OUTPUT: H-Output-1
**
*Output, history, variable=PRESELECT
*End Step
