*Heading
** Job name: job-implant-base Model name: Model-1
** Generated by: Abaqus/CAE 2022
*Preprint, echo=NO, model=NO, history=NO, contact=NO
**
** PARTS
**
*Part, name=implante-2-Copy4
*End Part
**
*Part, name=osso-cut
*End Part
**
**
** ASSEMBLY
**
*Assembly, name=Assembly
**
*Instance, name=implante-2-Copy4-1, part=implante-2-Copy4
   13.496435,     -5.70859,           0.
*Node
      1,  -1.64397871,    42.175106
      2,  -25.1849537,   19.3163319
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*Element, type=CPS8R
  1,  150,  364,   40,   41,  763,  764,  765,  766
  2,   43,  150,   42,    4,  767,  768,  769,  770
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*Nset, nset=Set-1
    1,    2,   15,   16,   17,   18
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*Elset, elset=Set-1, generate
 269,  697,    1
*Nset, nset=Set-2
    1,    2,    3,    4,    5,    6
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*Elset, elset=Set-2, generate
   1,  268,    1
** Section: Tit-imp-sect
*Solid Section, elset=Set-2, material=titanium
11.5,
** Section: CoCr-imp-section
*Solid Section, elset=Set-1, material=Co-Cr
11.5,
*End Instance
**
*Instance, name=osso-cut-1, part=osso-cut
*Node
      1,    14.514101,   39.0510254
      2,   18.0629616,   42.4970436
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*Element, type=CPS8R
   1,   88,  546,   87,  637, 1229, 1230, 1231, 1232
   2,  731,  661, 1119,  645, 1233, 1234, 1235, 1236
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*Nset, nset=set-osso, generate
    1,  3582,     1
*Elset, elset=set-osso, generate
    1,  1127,     1
** Section: osso-section
*Solid Section, elset=set-osso, material=osso
22.5,
*End Instance
**
*Node
      1,   30.2002602,   36.5308228,           0.
*Node
      2,  -8.33855247,   43.7199593,           0.
*Nset, nset=FH2
 2,
*Nset, nset=Set-52, instance=osso-cut-1
   50,   51,   52,   53,   54,   55
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*Elset, elset=Set-52, instance=osso-cut-1
 134, 135, 136, 160, 164, 167
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*Nset, nset=Set-53
 2,
*Nset, nset=Set-54
 1,
*Nset, nset=fa_point
 1,
*Nset, nset=points-2, instance=implante-2-Copy4-1
 1286, 2197
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*Elset, elset=_fh2_sur_S1, internal, instance=implante-2-Copy4-1
 369, 476
*Elset, elset=_fh2_sur_S3, internal, instance=implante-2-Copy4-1
 562,
*Surface, type=ELEMENT, name=fh2_sur
_fh2_sur_S1, S1
_fh2_sur_S3, S3
*Elset, elset=_mast2-haste_S3, internal, instance=implante-2-Copy4-1
   1,   2,  20,  23,  35,  36
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*Elset, elset=_mast2-haste_S1, internal, instance=implante-2-Copy4-1
   8,  13,  22,  30,  33,  38
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*Elset, elset=_mast2-haste_S2, internal, instance=implante-2-Copy4-1
   3,   4,   5,   7,  15,  16,  27,  28,  30,  31,  69, 267
*Elset, elset=_mast2-haste_S4, internal, instance=implante-2-Copy4-1
   2,  17,  29,  45,  53, 129
*Surface, type=ELEMENT, name=mast2-haste
_mast2-haste_S3, S3
_mast2-haste_S1, S1
_mast2-haste_S2, S2
_mast2-haste_S4, S4
*Elset, elset=_master1-head_S4, internal, instance=implante-2-Copy4-1
 272, 299, 301, 314, 329, 330
*Elset, elset=_master1-head_S3, internal, instance=implante-2-Copy4-1
 302, 312
*Elset, elset=_master1-head_S2, internal, instance=implante-2-Copy4-1
 283, 313, 331, 338
*Surface, type=ELEMENT, name=master1-head
_master1-head_S4, S4
_master1-head_S3, S3
_master1-head_S2, S2
*Elset, elset=_sec1-bone_S3, internal, instance=osso-cut-1
  14, 113, 392
*Elset, elset=_sec1-bone_S1, internal, instance=osso-cut-1
 393, 394, 395, 415, 416, 460, 466
*Elset, elset=_sec1-bone_S4, internal, instance=osso-cut-1
 122, 562
*Surface, type=ELEMENT, name=sec1-bone
_sec1-bone_S3, S3
_sec1-bone_S1, S1
_sec1-bone_S4, S4
*Elset, elset=_sec2-bone_S2, internal, instance=osso-cut-1
   15,   30,   75,   76,   77,   84
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*Elset, elset=_sec2-bone_S3, internal, instance=osso-cut-1
  16,  55,  95,  97,  99, 122, 302, 390, 397, 406, 407, 411, 541, 602
*Elset, elset=_sec2-bone_S4, internal, instance=osso-cut-1
  21,  29,  31,  51,  52,  82
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*Elset, elset=_sec2-bone_S1, internal, instance=osso-cut-1
  30, 101, 108, 308, 396, 408, 409, 410, 412, 414, 542, 548, 561
*Surface, type=ELEMENT, name=sec2-bone
_sec2-bone_S2, S2
_sec2-bone_S3, S3
_sec2-bone_S4, S4
_sec2-bone_S1, S1
*Elset, elset=_surf_fa_S4, internal, instance=osso-cut-1
 211,
*Elset, elset=_surf_fa_S3, internal, instance=osso-cut-1
 391,
*Surface, type=ELEMENT, name=surf_fa
_surf_fa_S4, S4
_surf_fa_S3, S3
** Constraint: Constraint-3
*Coupling, constraint name=Constraint-3, ref node=FH2, surface=fh2_sur
*Distributing, weighting method=UNIFORM
** Constraint: Constraint-4
*Coupling, constraint name=Constraint-4, ref node=fa_point, surface=surf_fa
*Distributing, weighting method=UNIFORM
** Constraint: tie-1-head
*Tie, name=tie-1-head, adjust=yes, type=SURFACE TO SURFACE
sec1-bone, master1-head
** Constraint: tie-2-haste
*Tie, name=tie-2-haste, adjust=yes, type=SURFACE TO SURFACE
sec2-bone, mast2-haste
*End Assembly
**
** MATERIALS
**
*Material, name=Co-Cr
*Elastic
230000., 0.3
*Material, name=osso
*Elastic
17000., 0.3
*Material, name=titanium
*Elastic
110000., 0.3
** ----------------------------------------------------------------
**
** STEP: Step-1
**
*Step, name=Step-1, nlgeom=NO
*Static
1., 1., 1e-05, 1.
**
** BOUNDARY CONDITIONS
**
** Name: BC-1 Type: Symmetry/Antisymmetry/Encastre
*Boundary
Set-52, ENCASTRE
**
** LOADS
**
** Name: FH2   Type: Concentrated force
*Cload
Set-53, 1, 150.
Set-53, 2, -259.
** Name: Load-2   Type: Concentrated force
*Cload
Set-54, 1, -50.
Set-54, 2, 86.
**
** OUTPUT REQUESTS
**
*Restart, write, frequency=0
**
** FIELD OUTPUT: F-Output-1
**
*Output, field, variable=PRESELECT
**
** HISTORY OUTPUT: H-Output-1
**
*Output, history, variable=PRESELECT
*End Step
