*Heading
** Job name: osso-implante-divided Model name: Model-1
** Generated by: Abaqus/CAE 2022
*Preprint, echo=NO, model=NO, history=NO, contact=NO
**
** PARTS
**
*Part, name=implante-2-Copy4
*End Part
**
*Part, name=osso-divided-cut
*End Part
**
**
** ASSEMBLY
**
*Assembly, name=Assembly
**
*Instance, name=implante-2-Copy4-1, part=implante-2-Copy4
   13.496435,     -5.70859,           0.
*Node
      1,  -1.64397871,    42.175106
      2,  -25.1849537,   19.3163319
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*Element, type=CPS8R
  1,  361,   40,    2,   41,  775,  776,  777,  778
  2,    5,   40,  361,   43,  779,  775,  780,  781
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*Nset, nset=Set-1
    1,    2,   15,   16,   17,   18
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*Elset, elset=Set-1, generate
 266,  709,    1
*Nset, nset=Set-2
    1,    2,    3,    4,    5,    6
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*Elset, elset=Set-2, generate
   1,  265,    1
*Nset, nset=Set-3
    1,    2,   15,   16,   17,   18
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*Elset, elset=Set-3, generate
 266,  709,    1
*Nset, nset=Set-4
    1,    2,   15,   16,   17,   18
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*Elset, elset=Set-4, generate
 266,  709,    1
*Nset, nset=Set-5
    1,    2,    3,    4,    5,    6
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*Elset, elset=Set-5, generate
   1,  265,    1
*Nset, nset=Set-6
    1,    2,    3,    4,    5,    6
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*Elset, elset=Set-6, generate
   1,  265,    1
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*Elset, elset=Set-8, generate
 266,  709,    1
*Nset, nset=Set-9
    1,    2,    3,    4,    5,    6
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*Elset, elset=Set-9, generate
   1,  265,    1
** Section: Tit-imp-sect
*Solid Section, elset=Set-9, material=titanium
11.5,
** Section: CoCr-imp-section
*Solid Section, elset=Set-8, material=Co-Cr
11.5,
*End Instance
**
*Instance, name=osso-divided-cut-1, part=osso-divided-cut
*Node
      1,   14.6738605,   39.2061577
      2,   11.8524561,   36.4665146
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*Element, type=CPS8R
  1,   30,  457,  455,   29, 1235, 1236, 1237, 1238
  2,  770,  787,  314,  657, 1239, 1240, 1241, 1242
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*Nset, nset=Set-1
    1,    2,    3,    4,    5,    6
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*Elset, elset=Set-1, generate
   1,  929,    1
*Nset, nset=Set-2
    1,   16,   17,   18,   19,   20
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*Elset, elset=Set-2, generate
  930,  1132,     1
** Section: osso-trabecular-sect
*Solid Section, elset=Set-1, material=osso-trabecular
22.5,
** Section: osso-section
*Solid Section, elset=Set-2, material=osso-cortical
22.5,
*End Instance
**
*Node
      1,  -4.47746229,    45.453949,           0.
*Node
      2,   30.7769642,    36.044754,           0.
*Node
      3,   4.02018499,   21.3664093,           0.
*Nset, nset=Set-61
 1,
*Nset, nset=Set-62
 2,
*Nset, nset=Set-63, instance=osso-divided-cut-1
   18,   19,   22,   24,  125,  126
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*Elset, elset=Set-63, instance=osso-divided-cut-1
  173,  174,  176,  201,  204,  206
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*Nset, nset=m_Set-59
 1,
*Nset, nset=m_Set-60
 2,
*Nset, nset=m_Set-66
 3,
*Nset, nset=m_Set-67
 3,
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*Elset, elset=_m_Surf-11_S2, internal, instance=implante-2-Copy4-1
 279, 299, 313, 332, 335
*Elset, elset=_m_Surf-11_S4, internal, instance=implante-2-Copy4-1
 300, 301, 302, 333, 334
*Elset, elset=_m_Surf-11_S3, internal, instance=implante-2-Copy4-1
 303, 304
*Surface, type=ELEMENT, name=m_Surf-11
_m_Surf-11_S2, S2
_m_Surf-11_S4, S4
_m_Surf-11_S3, S3
*Elset, elset=_m_Surf-13_S3, internal, instance=implante-2-Copy4-1
   1,   6,  13,  18,  29,  30
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*Elset, elset=_m_Surf-13_S4, internal, instance=implante-2-Copy4-1
   2,  23,  27,  28,  29,  44,  52,  67, 130
*Elset, elset=_m_Surf-13_S1, internal, instance=implante-2-Copy4-1
   3,   4,   8,  14,  19,  28
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*Elset, elset=_m_Surf-13_S2, internal, instance=implante-2-Copy4-1
  5,  7, 25, 26, 66
*Surface, type=ELEMENT, name=m_Surf-13
_m_Surf-13_S3, S3
_m_Surf-13_S4, S4
_m_Surf-13_S2, S2
_m_Surf-13_S1, S1
*Elset, elset=_mast2-haste_S3, internal, instance=implante-2-Copy4-1
   1,   6,  13,  18,  29,  30
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*Elset, elset=_mast2-haste_S4, internal, instance=implante-2-Copy4-1
   2,  23,  27,  28,  29,  44,  52,  67, 130
*Elset, elset=_mast2-haste_S1, internal, instance=implante-2-Copy4-1
   3,   4,   8,  14,  19,  28
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*Elset, elset=_mast2-haste_S2, internal, instance=implante-2-Copy4-1
  5,  7, 25, 26, 66
*Surface, type=ELEMENT, name=mast2-haste
_mast2-haste_S3, S3
_mast2-haste_S4, S4
_mast2-haste_S2, S2
_mast2-haste_S1, S1
*Elset, elset=_master1-head_S2, internal, instance=implante-2-Copy4-1
 279, 299, 313, 332, 335
*Elset, elset=_master1-head_S4, internal, instance=implante-2-Copy4-1
 300, 301, 302, 333, 334
*Elset, elset=_master1-head_S3, internal, instance=implante-2-Copy4-1
 303, 304
*Surface, type=ELEMENT, name=master1-head
_master1-head_S2, S2
_master1-head_S4, S4
_master1-head_S3, S3
*Elset, elset=_s_Surf-7_S1, internal, instance=osso-divided-cut-1
   98,  357,  358,  383,  410,  989, 1013, 1076
*Elset, elset=_s_Surf-7_S2, internal, instance=osso-divided-cut-1
 97,
*Elset, elset=_s_Surf-7_S4, internal, instance=osso-divided-cut-1
 384, 930, 942
*Elset, elset=_s_Surf-7_S3, internal, instance=osso-divided-cut-1
 1014,
*Surface, type=ELEMENT, name=s_Surf-7
_s_Surf-7_S1, S1
_s_Surf-7_S2, S2
_s_Surf-7_S4, S4
_s_Surf-7_S3, S3
*Elset, elset=_s_Surf-9_S4, internal, instance=osso-divided-cut-1
   1,  14,  15,  24,  25,  27
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*Elset, elset=_s_Surf-9_S2, internal, instance=osso-divided-cut-1
  28,  32,  42,  58,  76,  95
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*Elset, elset=_s_Surf-9_S1, internal, instance=osso-divided-cut-1
  67,  75, 227, 359, 376, 378, 381, 415, 417, 422
*Elset, elset=_s_Surf-9_S3, internal, instance=osso-divided-cut-1
  15,  24,  66,  87,  94, 364, 380
*Surface, type=ELEMENT, name=s_Surf-9
_s_Surf-9_S4, S4
_s_Surf-9_S2, S2
_s_Surf-9_S1, S1
_s_Surf-9_S3, S3
*Elset, elset=_s_Surf-11_S2, internal, instance=implante-2-Copy4-1
 279, 313, 332, 335
*Elset, elset=_s_Surf-11_S2, internal, instance=osso-divided-cut-1
 97,
*Elset, elset=_s_Surf-11_S4, internal, instance=implante-2-Copy4-1
 333, 334
*Elset, elset=_s_Surf-11_S4, internal, instance=osso-divided-cut-1
 384, 930, 942
*Elset, elset=_s_Surf-11_S1, internal, instance=osso-divided-cut-1
   98,  357,  358,  383,  410,  989, 1013, 1076
*Elset, elset=_s_Surf-11_S3, internal, instance=osso-divided-cut-1
 1014,
*Surface, type=ELEMENT, name=s_Surf-11
_s_Surf-11_S2, S2
_s_Surf-11_S4, S4
_s_Surf-11_S1, S1
_s_Surf-11_S3, S3
*Elset, elset=_s_Surf-13_S4, internal, instance=osso-divided-cut-1
   1,  14,  15,  24,  25,  27
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*Elset, elset=_s_Surf-13_S2, internal, instance=osso-divided-cut-1
  28,  32,  42,  58,  76,  95
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*Elset, elset=_s_Surf-13_S1, internal, instance=osso-divided-cut-1
  67,  75, 227, 359, 376, 378, 381, 415, 417, 422
*Elset, elset=_s_Surf-13_S3, internal, instance=osso-divided-cut-1
  15,  24,  66,  87,  94, 364, 380
*Surface, type=ELEMENT, name=s_Surf-13
_s_Surf-13_S4, S4
_s_Surf-13_S2, S2
_s_Surf-13_S1, S1
_s_Surf-13_S3, S3
*Elset, elset=_s_Surf-15_S3, internal, instance=implante-2-Copy4-1
 293, 305, 343
*Elset, elset=_s_Surf-15_S1, internal, instance=implante-2-Copy4-1
 341,
*Surface, type=ELEMENT, name=s_Surf-15
_s_Surf-15_S3, S3
_s_Surf-15_S1, S1
*Elset, elset=_s_Surf-16_S3, internal, instance=osso-divided-cut-1
 1070,
*Elset, elset=_s_Surf-16_S1, internal, instance=osso-divided-cut-1
 1072,
*Elset, elset=_s_Surf-16_S4, internal, instance=osso-divided-cut-1
 1098,
*Elset, elset=_s_Surf-16_S2, internal, instance=osso-divided-cut-1
 1101,
*Surface, type=ELEMENT, name=s_Surf-16
_s_Surf-16_S3, S3
_s_Surf-16_S1, S1
_s_Surf-16_S4, S4
_s_Surf-16_S2, S2
*Elset, elset=_s_Surf-17_S3, internal, instance=implante-2-Copy4-1
 293, 305, 343
*Elset, elset=_s_Surf-17_S1, internal, instance=implante-2-Copy4-1
 341,
*Surface, type=ELEMENT, name=s_Surf-17
_s_Surf-17_S3, S3
_s_Surf-17_S1, S1
*Elset, elset=_s_Surf-18_S3, internal, instance=osso-divided-cut-1
 1070,
*Elset, elset=_s_Surf-18_S1, internal, instance=osso-divided-cut-1
 1072,
*Elset, elset=_s_Surf-18_S4, internal, instance=osso-divided-cut-1
 1098,
*Elset, elset=_s_Surf-18_S2, internal, instance=osso-divided-cut-1
 1101,
*Surface, type=ELEMENT, name=s_Surf-18
_s_Surf-18_S3, S3
_s_Surf-18_S1, S1
_s_Surf-18_S4, S4
_s_Surf-18_S2, S2
** Constraint: Constraint-1
*Tie, name=Constraint-1, adjust=yes, type=SURFACE TO SURFACE
s_Surf-11, m_Surf-11
** Constraint: Constraint-2
*Tie, name=Constraint-2, adjust=yes, type=SURFACE TO SURFACE
s_Surf-13, m_Surf-13
** Constraint: Constraint-3
*Coupling, constraint name=Constraint-3, ref node=m_Set-59, surface=s_Surf-15
*Distributing, weighting method=UNIFORM
** Constraint: Constraint-4
*Coupling, constraint name=Constraint-4, ref node=m_Set-60, surface=s_Surf-16
*Distributing, weighting method=UNIFORM
** Constraint: Constraint-5
*Coupling, constraint name=Constraint-5, ref node=m_Set-66, surface=s_Surf-17
*Distributing, weighting method=UNIFORM
** Constraint: Constraint-6
*Coupling, constraint name=Constraint-6, ref node=m_Set-67, surface=s_Surf-18
*Distributing, weighting method=UNIFORM
*End Assembly
**
** MATERIALS
**
*Material, name=Co-Cr
*Elastic
230000., 0.3
*Material, name=alumina
*Elastic
380000., 0.21
*Material, name=osso-cortical
*Elastic
17000., 0.3
*Material, name=osso-trabecular
*Elastic
1380., 0.3
*Material, name=stainless-steel-316
*Elastic
200000., 0.3
*Material, name=titanium
*Elastic
110000., 0.3
** ----------------------------------------------------------------
**
** STEP: Step-1
**
*Step, name=Step-1, nlgeom=NO
*Static
1., 1., 1e-05, 1.
**
** BOUNDARY CONDITIONS
**
** Name: BC-2 Type: Symmetry/Antisymmetry/Encastre
*Boundary
Set-63, ENCASTRE
**
** LOADS
**
** Name: Load-3   Type: Concentrated force
*Cload
Set-61, 1, 150.
Set-61, 2, -259.
** Name: Load-4   Type: Concentrated force
*Cload
Set-62, 1, -50.
Set-62, 2, 89.
**
** OUTPUT REQUESTS
**
*Restart, write, frequency=0
**
** FIELD OUTPUT: F-Output-1
**
*Output, field, variable=PRESELECT
**
** HISTORY OUTPUT: H-Output-1
**
*Output, history, variable=PRESELECT
*End Step
